// COMSOL Multiphysics 6.4.0.429 model "laser_source_calibration.mph"
// Literature-informed, normalized thermoelastic line-source calibration. 6.5 ns duration from Sensors 2021,21,7105 treated as Gaussian FWHM; X65 thermal data from doi:10.1002/srin.202300309 Table 4. Absorbed fluence and line geometry are benchmark assumptions. Symmetric local flat patch; not a reproduction of a pipe experiment. See LASER_CALIBRATION.md.
// Outline of the model tree

Parameters
  E0 = 212442565550.3707[Pa]  // Inherited weld-model elastic modulus
  nu0 = 0.2889775930054178  // Inherited weld-model Poisson ratio
  rho0 = 7859.97504274123[kg/m^3]  // Inherited weld-model density
  k0 = 52[W/(m*K)]  // X65 thermal conductivity; Dolz et al. Table 4
  Cp0 = 480[J/(kg*K)]  // X65 heat capacity; Table 4, converted from mJ/(tonne K)
  alpha0 = 11e-6[1/K]  // X65 linear expansion; Dolz et al. Table 4
  T0 = 293.15[K]  // Ambient and strain reference temperature
  lambda_laser = 1064[nm]  // Literature laser wavelength; optical field not solved
  pulse_fwhm = 6.5[ns]  // Reported pulse duration interpreted as Gaussian FWHM
  sigma_t = pulse_fwhm/(2*sqrt(2*log(2)))  // Gaussian temporal standard deviation
  t0 = 30[ns]  // Pulse centre; computational trigger offset
  w0 = 0.5[mm]  // 1/e^2 line half-width inherited from weld benchmark; not pipe-paper beam diameter
  F_abs = 10[J/m^2]  // Assumed peak absorbed fluence; small-signal normalization
  Eline_abs = F_abs*w0*sqrt(pi/2)  // Full symmetric line: absorbed energy per out-of-plane length
  A_guess = E0*alpha0*F_abs/((1-nu0)*rho0*Cp0*w0)  // Thin heated-layer tangential dipole scale; validate against thermal model
  dipole_scale = 1  // Multiplier to fit to thermoelastic receiver waveforms
  half_width = 4[mm]  // Half-model x extent; mirror across x=0
  depth = 4[mm]  // Local calibration depth; not the pipe wall thickness
  h_bulk = 0.08[mm]  // Quadratic bulk mesh target for analysis up to 5 MHz
  dt_out = 2[ns]  // Uniform receiver output spacing
  t_end = 0.9[us]  // Early comparison window, before outer-boundary returns
  max_dt = 2[ns]  // Internal step cap after pulse generation
  r_obs = 2[mm]  // Bulk observation arc radius
  cP = sqrt(E0*(1-nu0)/(rho0*(1+nu0)*(1-2*nu0)))  // Longitudinal speed
  cS = sqrt(E0/(2*rho0*(1+nu0)))  // Shear speed
  thermal_depth = 2.5549999999999998E-5[m]  // Graded thermal skin: 50 nm top layer to 12.8 um bottom layer
  n_strip = 80  // Mapped elements across half-width

Variables
  src "Normalized laser and equivalent dipole"
    gtime = exp(-0.5*((t-t0)/sigma_t)^2)/(sqrt(2*pi)*sigma_t)
    Htime = 0.5*(1+erf((t-t0)/(sqrt(2)*sigma_t)))
    q_laser = F_abs*exp(-2*(x/w0)^2)*gtime
    tx_dipole = dipole_scale*A_guess*(4*x/w0)*exp(-2*(x/w0)^2)*Htime

Selections
  top: Box | entitydim = 1; xmin = -1e-8; xmax = half_width+1e-8; ymin = -1e-8; ymax = 1e-8; condition = inside
  sym: Box | entitydim = 1; xmin = -1e-8; xmax = 1e-8; ymin = -depth-1e-8; ymax = 1e-8; condition = inside
  skin: Box
    entitydim = 2
    xmin = -1e-8
    xmax = half_width+1e-8
    ymin = -thermal_depth-1e-8
    ymax = 1e-8
    condition = inside
  v0: Box | entitydim = 1; xmin = -1e-8; xmax = 1e-8; ymin = -6.0E-8; ymax = 1.0E-8; condition = inside
  h0: Box | entitydim = 1; xmin = -1e-8; xmax = half_width+1e-8; ymin = -1.0E-8; ymax = 1.0E-8; condition = inside
  v1: Box | entitydim = 1; xmin = -1e-8; xmax = 1e-8; ymin = -1.6E-7; ymax = -4.0E-8; condition = inside
  h1: Box "Box 1a"
    entitydim = 1
    xmin = -1e-8
    xmax = half_width+1e-8
    ymin = -6.0E-8
    ymax = -4.0E-8
    condition = inside
  v2: Box "Box 2a" | entitydim = 1; xmin = -1e-8; xmax = 1e-8; ymin = -3.6E-7; ymax = -1.4e-07; condition = inside
  h2: Box "Box 2b"
    entitydim = 1
    xmin = -1e-8
    xmax = half_width+1e-8
    ymin = -1.6E-7
    ymax = -1.4e-07
    condition = inside
  v3: Box "Box 3a" | entitydim = 1; xmin = -1e-8; xmax = 1e-8; ymin = -7.6E-7; ymax = -3.4E-7; condition = inside
  h3: Box "Box 3b"
    entitydim = 1
    xmin = -1e-8
    xmax = half_width+1e-8
    ymin = -3.6E-7
    ymax = -3.4E-7
    condition = inside
  v4: Box "Box 4a" | entitydim = 1; xmin = -1e-8; xmax = 1e-8; ymin = -1.56e-06; ymax = -7.4E-7; condition = inside
  h4: Box "Box 4b"
    entitydim = 1
    xmin = -1e-8
    xmax = half_width+1e-8
    ymin = -7.6E-7
    ymax = -7.4E-7
    condition = inside
  v5: Box "Box 5a" | entitydim = 1; xmin = -1e-8; xmax = 1e-8; ymin = -3.16E-6; ymax = -1.54E-6; condition = inside
  h5: Box "Box 5b"
    entitydim = 1
    xmin = -1e-8
    xmax = half_width+1e-8
    ymin = -1.56e-06
    ymax = -1.54E-6
    condition = inside
  v6: Box | entitydim = 1; xmin = -1e-8; xmax = 1e-8; ymin = -6.36E-6; ymax = -3.14E-6; condition = inside
  h6: Box "Box 6a"
    entitydim = 1
    xmin = -1e-8
    xmax = half_width+1e-8
    ymin = -3.16E-6
    ymax = -3.14E-6
    condition = inside
  v7: Box | entitydim = 1; xmin = -1e-8; xmax = 1e-8; ymin = -1.276E-5; ymax = -6.34E-6; condition = inside
  h7: Box "Box 7a"
    entitydim = 1
    xmin = -1e-8
    xmax = half_width+1e-8
    ymin = -6.36E-6
    ymax = -6.34E-6
    condition = inside
  v8: Box | entitydim = 1; xmin = -1e-8; xmax = 1e-8; ymin = -2.556E-5; ymax = -1.274E-5; condition = inside
  h8: Box "Box 8a"
    entitydim = 1
    xmin = -1e-8
    xmax = half_width+1e-8
    ymin = -1.276E-5
    ymax = -1.274E-5
    condition = inside

Geometry
  geom1 "Geometry 1" (2D, length unit m)
    layer0: Rectangle | size = {half_width, 5.0E-8}; pos = {0, -5.0E-8}
    layer1: Rectangle | size = {half_width, 1.0E-7}; pos = {0, -1.5E-7}
    layer2: Rectangle | size = {half_width, 2.0E-7}; pos = {0, -3.5E-7}
    layer3: Rectangle | size = {half_width, 4.0E-7}; pos = {0, -7.5E-7}
    layer4: Rectangle | size = {half_width, 8.0E-7}; pos = {0, -1.55E-6}
    layer5: Rectangle | size = {half_width, 1.6E-6}; pos = {0, -3.15E-6}
    layer6: Rectangle | size = {half_width, 3.2E-6}; pos = {0, -6.35E-6}
    layer7: Rectangle | size = {half_width, 6.4E-6}; pos = {0, -1.275E-5}
    layer8: Rectangle | size = {half_width, 1.28E-5}; pos = {0, -2.555e-05}
    bulk: Rectangle | size = {half_width, depth-thermal_depth}; pos = {0, -depth}
    fin: Finalize "Form Union"

Materials
  mat1: Common "X65 benchmark: weld elasticity plus literature thermal data" on all domains
    def: def "Basic"
      density = rho0
      youngsmodulus = E0
      poissonsratio = nu0
      thermalconductivity = k0
      heatcapacity = Cp0
      thermalexpansioncoefficient = alpha0

Physics
  ht: HeatTransfer "Heat Transfer in Solids" on all domains
    dependent variable T
    solid1: SolidHeatTransferModel "Solid 1" (default)
    init1: init "Initial Values 1" (default) | Tinit = T0
    ins1: ThermalInsulation (default)
    laser: HeatFluxBoundary "Absorbed Gaussian laser heat flux" on selection top | q0_input = q_laser
  solid: SolidMechanics "Thermoelastic reference" on all domains
    dependent variable u = {u, v, w}
    lemm1: LinearElasticModel "Linear Elastic Material 1" (default)
      te1: ThermalExpansion on all domains | minput_strainreferencetemperature = T0; minput_temperature = T
    free1: Free (default)
    init1: init "Initial Values 1" (default)
    sym1: SymmetrySolid "Symmetry 1" on selection sym
  dip: SolidMechanics "Equivalent dipole comparison" on all domains
    dependent variable udisp = {ud, vd, wd}
    lemm1: LinearElasticModel "Linear Elastic Material 1" (default)
    free1: Free (default)
    init1: init "Initial Values 1" (default)
    sym1: SymmetrySolid "Symmetry 1" on selection sym
    load1: BoundaryLoad on selection top | FperArea = {tx_dipole, 0, 0}

Mesh
  mesh1 "Mesh 1"
    size: MeshSizeDefault | hmax = h_bulk; hmin = h_bulk/4; custom = on
    map0: Map "Mapped" on selection geom1_layer0_dom
      dv: Distribution on selection v0 | numelem = 1
      dh: Distribution on selection h0 | numelem = n_strip
    map1: Map "Mapped 1" on selection geom1_layer1_dom
      dv: Distribution on selection v1 | numelem = 1
      dh: Distribution on selection h1 | numelem = n_strip
    map2: Map "Mapped 2" on selection geom1_layer2_dom
      dv: Distribution on selection v2 | numelem = 1
      dh: Distribution on selection h2 | numelem = n_strip
    map3: Map "Mapped 3" on selection geom1_layer3_dom
      dv: Distribution on selection v3 | numelem = 1
      dh: Distribution on selection h3 | numelem = n_strip
    map4: Map "Mapped 4" on selection geom1_layer4_dom
      dv: Distribution on selection v4 | numelem = 1
      dh: Distribution on selection h4 | numelem = n_strip
    map5: Map "Mapped 5" on selection geom1_layer5_dom
      dv: Distribution on selection v5 | numelem = 1
      dh: Distribution on selection h5 | numelem = n_strip
    map6: Map "Mapped 6" on selection geom1_layer6_dom
      dv: Distribution on selection v6 | numelem = 1
      dh: Distribution on selection h6 | numelem = n_strip
    map7: Map "Mapped 7" on selection geom1_layer7_dom
      dv: Distribution on selection v7 | numelem = 1
      dh: Distribution on selection h7 | numelem = n_strip
    map8: Map "Mapped 8" on selection geom1_layer8_dom
      dv: Distribution on selection v8 | numelem = 1
      dh: Distribution on selection h8 | numelem = n_strip
    tri: FreeTri "Free Triangular" on selection geom1_bulk_dom

Studies
  std1 "1 - Heat input and thermoelastic wave generation"
    time: Transient "Time Dependent" | tlist = range(0,dt_out,t_end); solve for = {ht, solid, comp1}
  std2 "2 - Equivalent dipole, elastic only"
    time: Transient "Time Dependent" | tlist = range(0,dt_out,t_end); solve for = {dip, comp1}

Solver configurations
  sol1 "Solution 1" (study std1)
    v1: Variables "Dependent Variables 1"
      comp1_u: Field "Displacement Field (comp1.u)" | scalemethod = manual; scaleval = 1e-10
      comp1_udisp: Field "Displacement Field (comp1.udisp)" | scalemethod = manual; scaleval = 1e-10
    t1: Time "Time-Dependent Solver 1"
      rtol = 1.0E-4
      timemethod = genalpha
      tstepsgenalpha = strict
      initialstepgenalpha = 0.1[ns]
      maxstepconstraintgenalpha = expr
      maxstepexpressiongenalpha = if(t<60[ns],0.5[ns],max_dt)
      fc1: FullyCoupled
      d1: Direct "Direct, heat transfer variables (ht) (Merged)"
  sol2 "Solution 2" (study std2)
    v1: Variables "Dependent Variables 1"
      comp1_u: Field "Displacement Field (comp1.u)" | scalemethod = manual; scaleval = 1e-10
      comp1_udisp: Field "Displacement Field (comp1.udisp)" | scalemethod = manual; scaleval = 1e-10
    t1: Time "Time-Dependent Solver 1"
      rtol = 1.0E-4
      timemethod = genalpha
      tstepsgenalpha = strict
      initialstepgenalpha = 0.1[ns]
      maxstepconstraintgenalpha = expr
      maxstepexpressiongenalpha = if(t<60[ns],0.5[ns],max_dt)
      dDef: Direct
      fc1: FullyCoupled

Datasets
  dset1: Solution | solution = sol1
  dset2: Solution | solution = sol2
  arcThermal: CutPoint2D
    data = dset1
    pointx = 0.0 0.000517638090205 0.001 0.00141421356237 0.00173205080757 0.00193185165258 0.002
    pointy = -0.002 -0.00193185165258 -0.00173205080757 -0.00141421356237 -0.001 -0.000517638090205 0
  arcDipole: CutPoint2D
    data = dset2
    pointx = 0.0 0.000517638090205 0.001 0.00141421356237 0.00173205080757 0.00193185165258 0.002
    pointy = -0.002 -0.00193185165258 -0.00173205080757 -0.00141421356237 -0.001 -0.000517638090205 0
  surfaceThermal: CutPoint2D | data = dset1; pointx = 0 0.0005 0.001 0.0015 0.002; pointy = 0 0 0 0 0
  surfaceDipole: CutPoint2D | data = dset2; pointx = 0 0.0005 0.001 0.0015 0.002; pointy = 0 0 0 0 0

Plots
  pgT: PlotGroup2D "Temperature rise near laser (Study 1)" | data = dset1
    surf1: Surface | expr = T-T0
  pgU: PlotGroup2D "Vertical displacement - thermoelastic" | data = dset1
    surf1: Surface | expr = v
  pgD: PlotGroup2D "Vertical displacement - equivalent dipole" | data = dset2
    surf1: Surface | expr = vd

Exports
  arcT: Data
    data = arcThermal
    expr = {u, v, solid.u_tX, solid.u_tY}
    unit = {m, m, m/s, m/s}
    filename = calibration_thermal_arc.txt
  arcD: Data
    data = arcDipole
    expr = {ud, vd, solid2.u_tX, solid2.u_tY}
    unit = {m, m, m/s, m/s}
    filename = calibration_dipole_arc.txt
  surfT: Data
    data = surfaceThermal
    expr = {u, v, solid.u_tX, solid.u_tY, T}
    unit = {m, m, m/s, m/s, K}
    filename = calibration_thermal_surface.txt
  surfD: Data
    data = surfaceDipole
    expr = {ud, vd, solid2.u_tX, solid2.u_tY}
    unit = {m, m, m/s, m/s}
    filename = calibration_dipole_surface.txt