// COMSOL Multiphysics 6.4.0.429 model "reference.mph"
// 9 mm fill; unchanged 2.5 mm radial LOF on straight bevel, 0.1 mm above root curve. Velocity-only RK4; MUMPS direct solver for Apple silicon. Use portable runner for five shots, 50 us each.
// Outline of the model tree

Parameters
  rho_steel = 7859.97504274123[kg/m^3]  // Dolphin laser setup input
  steel_cp = 5943.603925367657[m/s]  // Dolphin laser setup input
  steel_cs = 3237.967635087099[m/s]  // Dolphin laser setup input
  wall_t = 25.4[mm]  // Dolphin laser setup input
  source_x = laser_x  // Active laser centre
  source_y = laser_y  // Active laser surface height
  ldv_angle = 0[deg]  // Dolphin laser setup input
  mesh_factor = 1.5  // Dolphin laser setup input
  mesh_fmax = 5000000[Hz]  // Dolphin laser setup input
  mesh_nlambda = 2  // Dolphin laser setup input
  dt_out = 10[ns]  // Dolphin laser setup input
  t_end = 50[us]  // Dolphin laser setup input
  equivalent_source = 0  // Original transducer source inactive
  full_fill = 0  // Dolphin laser setup input
  fill_height = 9[mm]  // Dolphin laser setup input
  lof_height = 2.5[mm]  // Dolphin laser setup input
  lof_upper_depth = 18.467475059977417[mm]  // Dolphin laser setup input
  lof_lower_depth = 20.967475059977417[mm]  // Dolphin laser setup input
  laser_x = 0[m]
  laser_y = 0.009[m]
  laser_cap_half = 0.0029402265139670328[m]
  laser_F_abs = 100[J/m^2]
  laser_w0 = 0.00050000000000000001[m]
  laser_fwhm = 6.5000000000000003e-09[s]
  laser_t0 = 2.9999999999999997e-08[s]
  laser_fit = 1.0844342935972646
  laser_plate_half = 0.074999999999999997[m]
  laser_plate_height = 0.025399999999999999[m]
  laser_abs_width = 0.014999999999999999[m]
  laser_fracture_segments = 1
  laser_abs_start = laser_plate_half-laser_abs_width
  laser_source = 1  // Calibrated equivalent thermoelastic laser source
  laser_E = rho_steel*steel_cs^2*(3*steel_cp^2-4*steel_cs^2)/(steel_cp^2-steel_cs^2)
  laser_nu = (steel_cp^2-2*steel_cs^2)/(2*(steel_cp^2-steel_cs^2))
  laser_alpha = 11e-6[1/K]
  laser_Cp = 480[J/(kg*K)]
  laser_sigma = laser_fwhm/(2*sqrt(2*log(2)))
  laser_A = laser_fit*laser_E*laser_alpha*laser_F_abs/((1-laser_nu)*rho_steel*laser_Cp*laser_w0)
  laser_Eline = laser_F_abs*laser_w0*sqrt(pi/2)
  laser_dt_cap = 0.5[ns]

Variables
  source "Variables"
    source_s = x-source_x
    burst = 0
    apod = 0
    source_p = 0[Pa]
    v_ldv = vx*sin(ldv_angle)+vy*cos(ldv_angle)
  laser "Variables 2"
    laser_xi = (x-laser_x)/laser_w0
    laser_H = 0.5*(1+erf((t-laser_t0)/(sqrt(2)*laser_sigma)))
    laser_tx = laser_A*4*laser_xi*exp(-2*laser_xi^2)*laser_H

Selections
  steelDomains: Union | entitydim = 2; input = {geom1_left_dom, geom1_right_dom, geom1_weld_dom}
  steelBoundary: Adjacent | entitydim = 2; input = {steelDomains}; outputdim = 1; interior = on
  recordBoundary: Union | entitydim = 1; input = {steelBoundary}
  sourceFace: Ball "Laser: exposed flat weld surface" | entitydim = 1; posx = laser_x; posy = laser_y; r = 1e-8[m]
  fractureSegment0: Ball | entitydim = 1; posx = 0.00276636501325; posy = 0.00568252494002; r = 1e-8[m]
  fracture: Union | entitydim = 1; input = {fractureSegment0}
  absLeft: Box
    entitydim = 2
    xmin = -laser_plate_half-1e-8[m]
    xmax = -laser_abs_start+1e-8[m]
    ymin = -1e-8[m]
    ymax = laser_plate_height+1e-8[m]
    condition = inside
  absRight: Box
    entitydim = 2
    xmin = laser_abs_start-1e-8[m]
    xmax = laser_plate_half+1e-8[m]
    ymin = -1e-8[m]
    ymax = laser_plate_height+1e-8[m]
    condition = inside
  endLeft: Box
    entitydim = 1
    xmin = -laser_plate_half-1e-8[m]
    xmax = -laser_plate_half+1e-8[m]
    ymin = -1e-8[m]
    ymax = laser_plate_height+1e-8[m]
    condition = inside
  endRight: Box
    entitydim = 1
    xmin = laser_plate_half-1e-8[m]
    xmax = laser_plate_half+1e-8[m]
    ymin = -1e-8[m]
    ymax = laser_plate_height+1e-8[m]
    condition = inside
  laserAbsorbers: Union | entitydim = 2; input = {absLeft, absRight}
  laserEnds: Union | entitydim = 1; input = {endLeft, endRight}
  laserCap: Box
    entitydim = 1
    xmin = -laser_cap_half-1e-8[m]
    xmax = laser_cap_half+1e-8[m]
    ymin = laser_y-1e-8[m]
    ymax = laser_y+1e-8[m]
    condition = inside

Coordinate systems
  laserAbs: AbsorbingLayer "Lateral absorbing layers; physical strip width 15 mm" on selection laserAbsorbers

Geometry
  geom1 "Geometry 1" (2D, length unit m)
    left: Polygon
      source = table
      table = 
        {0, 0}
        {0, 0.00133930387414}
        {-0.000266830338598, 0.00139323782181}
        {-0.00052811109456, 0.00146965553489}
        {-0.000781951368332, 0.00156800397524}
        {-0.00102651410743, 0.00168757139116}
        {-0.00126002940128, 0.00182749246837}
        {-0.00148080729011, 0.00198675459228}
        {-0.00168724999528, 0.00216420517636}
        {-0.00187786348245, 0.00235856000345}
        {-0.002051268274, 0.0025684125197}
        {-0.00220620943234, 0.00279224401382}
        {-0.00234156564193, 0.00302843460811}
        {-0.00245635732434, 0.00327527498155}
        {-0.00254975372745, 0.00353097874021}
        {-0.00262107893765, 0.0037936953455}
        {-0.00266981677147, 0.00406152350657}
        {-0.00269561451121, 0.00433252494002}
        {-0.00270085528914, 0.00443252494002}
        {-0.00283187473735, 0.00693252494002}
        {-0.00294022651397, 0.009}
        {-0.00355339753158, 0.0207}
        {-0.00355339753158, 0.0254}
        {-0.075, 0.0254}
        {-0.075, 0}
    right: Polygon
      source = table
      table = 
        {0, 0}
        {0, 0.00133930387414}
        {0.000266830338598, 0.00139323782181}
        {0.00052811109456, 0.00146965553489}
        {0.000781951368332, 0.00156800397524}
        {0.00102651410743, 0.00168757139116}
        {0.00126002940128, 0.00182749246837}
        {0.00148080729011, 0.00198675459228}
        {0.00168724999528, 0.00216420517636}
        {0.00187786348245, 0.00235856000345}
        {0.002051268274, 0.0025684125197}
        {0.00220620943234, 0.00279224401382}
        {0.00234156564193, 0.00302843460811}
        {0.00245635732434, 0.00327527498155}
        {0.00254975372745, 0.00353097874021}
        {0.00262107893765, 0.0037936953455}
        {0.00266981677147, 0.00406152350657}
        {0.00269561451121, 0.00433252494002}
        {0.00270085528914, 0.00443252494002}
        {0.00283187473735, 0.00693252494002}
        {0.00294022651397, 0.009}
        {0.00355339753158, 0.0207}
        {0.00355339753158, 0.0254}
        {0.075, 0.0254}
        {0.075, 0}
    weld: Polygon
      source = table
      table = 
        {0, 0.00133930387414}
        {0.000266830338598, 0.00139323782181}
        {0.00052811109456, 0.00146965553489}
        {0.000781951368332, 0.00156800397524}
        {0.00102651410743, 0.00168757139116}
        {0.00126002940128, 0.00182749246837}
        {0.00148080729011, 0.00198675459228}
        {0.00168724999528, 0.00216420517636}
        {0.00187786348245, 0.00235856000345}
        {0.002051268274, 0.0025684125197}
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    absToolLeft: Rectangle | size = {laser_abs_width, laser_plate_height}; pos = {-laser_plate_half, 0}
    absPartitionLeft: Partition "Partition Objects" | input = left; tool = absToolLeft
    absToolRight: Rectangle | size = {laser_abs_width, laser_plate_height}; pos = {laser_abs_start, 0}
    absPartitionRight: Partition "Partition Objects 2" | input = right; tool = absToolRight
    fin: Finalize "Form Union"

Materials
  steel: Common "Inherited isotropic steel; grade properties unverified" on selection steelDomains
    def: def "Basic"
      density = rho_steel
    CpCs: CpCs "Pressure-wave and shear-wave speeds"
      cp = steel_cp
      cs = steel_cs

Physics
  elte: ElasticWavesTimeExplicit on all domains
    dependent variable v = {vx, vy, vz}
    eltem1: ElasticWavesTimeExplicitModel (default) | IsotropicOption = CpCs
    free1: Free (default)
    init1: init "Initial Values 1" (default)
    frac1: Fracture (disabled) on selection fracture | kPerArea = 0
    load1: BoundaryLoad "Laser: outward tangential dipole on weld cap" on selection laserCap
      forceType = ForceArea
      force = {0, 0, 0}
      forceReferenceArea_src = userdef
      forceReferenceArea = {laser_tx, 0, 0}
    laserLRB: LowReflectingBoundary "Low-reflecting outer vertical ends only" on selection laserEnds

Mesh
  mesh1 "Mesh 1"
    size: MeshSizeDefault | hmax = mesh_factor*steel_cs/mesh_fmax/mesh_nlambda; hmin = mesh_factor*0.025[mm]; custom = on
    weldSize: Size on selection geom1_weld_dom
      hmax = steel_cs/mesh_fmax/mesh_nlambda
      hmin = mesh_factor*0.025[mm]
      custom = on
    tri: FreeTri "Free Triangular" on remaining entities

Studies
  std1 "Study 1"
    time: Transient "Time Dependent"
      tlist = range(0,dt_out,t_end)
      outputmap = {elte, selection, frame:spatial1, physics, frame:material1, physics, comp1, physics}
      outputselectionmap = {elte, recordBoundary, frame:spatial1, , frame:material1, , comp1, }

Solver configurations
  sol1 "Solution 1" (study std1)
    v1: Variables "Dependent Variables 1"
    t1: Time "Time-Dependent Solver 1"
      tlist = 0 0.5e-6 1e-6 2e-6 4e-6 8e-6 12e-6 20e-6 30e-6 40e-6 50e-6
      timemethodexp = erk
      updtstep = manual
      exprs = min(root.comp1.elte.wtc,if(t<laser_t0+8*laser_sigma,laser_dt_cap,1[s]))
      dDef: Direct
      fc1: FullyCoupled

Datasets
  dset1: Solution | solution = sol1
  surface: Solution on selection steelBoundary | solution = sol1
  sourceSolution: Solution on selection recordBoundary | solution = sol1
  left: CutPoint2D "Laser receivers: left"
    data = surface
    pointx = -0.0435533975316 -0.0433033975316 -0.0430533975316 -0.0428033975316 -0.0425533975316 -0.0423033975316 -0.0420533975316 -0.0418033975316 -0.0415533975316 -0.0413033975316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
    pointy = 0.0254 0.0254 0.0254 0.0254 0.0254 0.0254 0.0254 0.0254 0.0254 0.0254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
  right: CutPoint2D "Laser receivers: right"
    data = surface
    pointx = 0.00455339753158 0.00480339753158 0.00505339753158 0.00530339753158 0.00555339753158 0.00580339753158 0.00605339753158 0.00630339753158 0.00655339753158 0.00680339753158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
    pointy = 0.0254 0.0254 0.0254 0.0254 0.0254 0.0254 0.0254 0.0254 0.0254 0.0254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
  weld: CutPoint2D "Laser receivers: weld"
    data = surface
    pointx = -0.00194022651397 -0.00169769819972 -0.00145516988548 -0.00121264157123 -0.000970113256984 -0.000727584942738 -0.000485056628492 -0.000242528314246 0 0.000242528314246 0.000485056628492 0.000727584942738 0.000970113256984 0.00121264157123 0.00145516988548 0.00169769819972 0.00194022651397
    pointy = 0.009 0.009 0.009 0.009 0.009 0.009 0.009 0.009 0.009 0.009 0.009 0.009 0.009 0.009 0.009 0.009 0.009
  laserSource: CutPoint2D "Laser receivers: laserSource" | data = surface; pointx = -2.5E-4 2.5E-4; pointy = 0.009 0.009